// COMSOL Multiphysics 5.2.1.199 model "nacacam.mph"
// sans titre
// Outline of the model tree

Parameters
  U0 = 1
  teta = -0.2
  beta = 1
  theta = -0.001

Variables
  var1 "Variables 1" on domains 1
    psi = psi1+beta*psi2
    u = -psi1y-beta*psi2y
    v = psi1x+beta*psi2x
    P = -0.5*(u*u+v*v)

Probes
  pdom1: DomainPoint "bord de fuite" | bndsnap2 = on; coords = {1.001, -0.001}
    ppb1: PointExpr "condition KJ"
      probename = beta
      expr = (psi1x*cos(theta)-psi1y*sin(theta))/(-psi2x*cos(theta)+psi2y*sin(theta))
      table = tbl10

Geometry
  geom1 "Géométrie 1" (2D, length unit m)
    c1: Circle "ifinie" | r = 10
    imp1: Import "naca" | filename = /home/etu/z/p1310840/tp_naca/nacacam.dxf
    dif1: Difference "Différence 1" | input = c1; input2 = imp1
    fin: Finalize "Constituer une union"

Physics
  lpeq: LaplaceEquation "Equation de Laplace" on all domains
    dependent variable psi1
    leq1: LaplaceEquation "Equation de Laplace 1" (default)
    zflx1: ZeroFluxBoundary "Flux nul 1" (default)
    init1: init "Valeurs initiales 1" (default)
    dir1: DirichletBoundary "Condition de Dirichlet 1" on boundaries 1-198 | r = 0
    dir2: DirichletBoundary "Condition de Dirichlet 2" on boundaries 199-202 | r = U0*(y*cos(teta)-x*sin(teta))
  lpeq2: LaplaceEquation "Equation de Laplace 2" on all domains
    dependent variable psi2
    leq1: LaplaceEquation "Equation de Laplace 1" (default)
    zflx1: ZeroFluxBoundary "Flux nul 1" (default)
    init1: init "Valeurs initiales 1" (default)
    dir1: DirichletBoundary "Condition de Dirichlet 1" on boundaries 1-198 | r = 1.0
    dir2: DirichletBoundary "Condition de Dirichlet 2" on boundaries 199-202 | r = 0

Mesh
  mesh1 "Maillage 1" (physics-controlled)
    size: MeshSizeDefault "Taille" | hauto = 5

Studies
  std1 "Etude 1"
    param: Parametric "Analyse paramétrique" | pname = teta; plistarr = range(-0.75,1.5/10,0.75)
    stat: Stationary "Stationnaire"

Solver configurations
  sol1 "Solution 1" (study std1)
    v1: Variables "Variables dépendantes 1"
    s1: Stationary "Solveur stationnaire 1"
      dDef: Direct
      p1: Parametric "Paramétrique 1"
        sweeptype = sparse
        pname = teta
        plistarr = range(-0.75,1.5/10,0.75)
        pcontinuationmode = no
      fc1: FullyCoupled "Couplage fort 1" | linsolver = dDef

Datasets
  dset1: Solution | solution = sol1
  dset2: Solution "Solution de la sonde 2" | solution = sol1
  cpt1: CutPoint2D "bord de fuite" | data = dset2; pointx = 1.001; pointy = -0.001

Derived values
  pev1: EvalPoint "condition KJ"
    data = cpt1
    table = tbl10
    expr = (psi1x*cos(theta)-psi1y*sin(theta))/(-psi2x*cos(theta)+psi2y*sin(theta))
  int1: IntLine "Intégration sur ligne 1" | data = dset1; table = tbl2; expr = {P*(-nx*sin(teta)+ny*cos(teta)), }
  pev2: EvalPoint "pression au points" on points 3, 5-201 | data = dset1; table = tbl7; expr = {P, , }
  pev3: EvalPoint "coordoonex" on points 3, 5-201 | data = dset1; table = tbl8; expr = {x, }
  pev4: EvalPoint "coordoone y" on points 3, 5-201 | data = dset1; table = tbl9; expr = {y, }

Tables
  tbl1: Table "kj"
    // condition KJ (-psi1x/psi2x)
    teta | Variable dépendante psi1 (1), Point: (1, 0)
    -0.75 | 1.58617
    -0.6 | 1.2372
    -0.45 | 0.860453
    -0.3 | 0.464379
    -0.15 | 0.0578759
    0 | -0.349927
    0.15 | -0.749871
    0.3 | -1.13297
    0.45 | -1.49063
    0.6 | -1.81482
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  tbl2: Table "pt"
    // Intégration sur ligne 1 (P*(-nx*sin(teta)+ny*cos(teta)), )
    teta | P*(-nx*sin(teta)+ny*cos(teta)) (1/m)
    -0.75 | 2.2827
    -0.6 | 1.72606
    -0.45 | 1.13011
    -0.3 | 0.508304
    -0.15 | -0.125255
    0 | -0.756124
    0.15 | -1.3699
    0.3 | -1.95257
    0.45 | -2.49092
    0.6 | -2.97279
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  tbl7: Table "p"
    // pression au points (P, , )
    teta | P (1/m^2), Point: 3 | P (1/m^2), Point: 5 | P (1/m^2), Point: 6 | P (1/m^2), Point: 7 | P (1/m^2), Point: 8 | P (1/m^2), Point: 9 | P (1/m^2), Point: 10 | P (1/m^2), Point: 11 | P (1/m^2), Point: 12 | P (1/m^2), Point: 13 | P (1/m^2), Point: 14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
    -0.75 | -5.10211 | -5.25152 | -4.95998 | -5.40236 | -4.81897 | -5.5471 | -4.67623 | -5.6883 | -4.52882 | -5.81796 | -4.37747
    -0.6 | -3.14113 | -3.27516 | -3.01282 | -3.41106 | -2.88667 | -3.54406 | -2.76096 | -3.67566 | -2.63405 | -3.80059 | -2.50648
    -0.45 | -1.55267 | -1.65693 | -1.45302 | -1.76368 | -1.35645 | -1.8704 | -1.26214 | -1.97777 | -1.16942 | -2.08281 | -1.07864
    -0.3 | -0.478608 | -0.541388 | -0.419916 | -0.607371 | -0.36501 | -0.675637 | -0.313666 | -0.746285 | -0.265777 | -0.818057 | -0.221506
    -0.15 | -0.014892 | -0.0281695 | -0.00578418 | -0.0454299 | -0.000905442 | -0.0664905 | -0.000253543 | -0.0912185 | -0.00383265 | -0.119319 | -0.011634
    0 | -0.202944 | -0.163124 | -0.24762 | -0.128051 | -0.296662 | -0.0973745 | -0.349901 | -0.0710832 | -0.406987 | -0.049006 | -0.467774
    0.15 | -1.02597 | -0.934197 | -1.12382 | -0.847855 | -1.22586 | -0.76553 | -1.33137 | -0.687677 | -1.43923 | -0.613399 | -1.54918
    0.3 | -2.41044 | -2.27251 | -2.55612 | -2.14054 | -2.7055 | -2.01127 | -2.857 | -1.88592 | -3.00835 | -1.76208 | -3.15925
    0.45 | -4.23269 | -4.05852 | -4.41657 | -3.89064 | -4.60341 | -3.72332 | -4.79051 | -3.55878 | -4.97418 | -3.39245 | -5.15417
    0.6 | -6.32995 | -6.13268 | -6.53899 | -5.94182 | -6.75005 | -5.74875 | -6.95917 | -5.55683 | -7.16113 | -5.35886 | -7.35574
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  tbl8: Table "x"
    // coordoonex (x, )
    teta | Coordonnée x (m), Point: 3 | Coordonnée x (m), Point: 5 | Coordonnée x (m), Point: 6 | Coordonnée x (m), Point: 7 | Coordonnée x (m), Point: 8 | Coordonnée x (m), Point: 9 | Coordonnée x (m), Point: 10 | Coordonnée x (m), Point: 11 | Coordonnée x (m), Point: 12 | Coordonnée x (m), Point: 13 | Coordonnée x (m), Point: 14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
    -0.75 | 0 | 0.000102 | 0.000102 | 0.000407 | 0.000409 | 0.000916 | 0.000921 | 0.001626 | 0.001639 | 0.002539 | 0.002563
    -0.6 | 0 | 0.000102 | 0.000102 | 0.000407 | 0.000409 | 0.000916 | 0.000921 | 0.001626 | 0.001639 | 0.002539 | 0.002563
    -0.45 | 0 | 0.000102 | 0.000102 | 0.000407 | 0.000409 | 0.000916 | 0.000921 | 0.001626 | 0.001639 | 0.002539 | 0.002563
    -0.3 | 0 | 0.000102 | 0.000102 | 0.000407 | 0.000409 | 0.000916 | 0.000921 | 0.001626 | 0.001639 | 0.002539 | 0.002563
    -0.15 | 0 | 0.000102 | 0.000102 | 0.000407 | 0.000409 | 0.000916 | 0.000921 | 0.001626 | 0.001639 | 0.002539 | 0.002563
    0 | 0 | 0.000102 | 0.000102 | 0.000407 | 0.000409 | 0.000916 | 0.000921 | 0.001626 | 0.001639 | 0.002539 | 0.002563
    0.15 | 0 | 0.000102 | 0.000102 | 0.000407 | 0.000409 | 0.000916 | 0.000921 | 0.001626 | 0.001639 | 0.002539 | 0.002563
    0.3 | 0 | 0.000102 | 0.000102 | 0.000407 | 0.000409 | 0.000916 | 0.000921 | 0.001626 | 0.001639 | 0.002539 | 0.002563
    0.45 | 0 | 0.000102 | 0.000102 | 0.000407 | 0.000409 | 0.000916 | 0.000921 | 0.001626 | 0.001639 | 0.002539 | 0.002563
    0.6 | 0 | 0.000102 | 0.000102 | 0.000407 | 0.000409 | 0.000916 | 0.000921 | 0.001626 | 0.001639 | 0.002539 | 0.002563
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  tbl9: Table "y"
    // coordoone y (y, )
    teta | Coordonnée y (m), Point: 3 | Coordonnée y (m), Point: 5 | Coordonnée y (m), Point: 6 | Coordonnée y (m), Point: 7 | Coordonnée y (m), Point: 8 | Coordonnée y (m), Point: 9 | Coordonnée y (m), Point: 10 | Coordonnée y (m), Point: 11 | Coordonnée y (m), Point: 12 | Coordonnée y (m), Point: 13 | Coordonnée y (m), Point: 14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
    -0.75 | 0.08 | 0.074028 | 0.085972 | 0.068107 | 0.091893 | 0.062238 | 0.097762 | 0.056421 | 0.103578 | 0.050657 | 0.109342
    -0.6 | 0.08 | 0.074028 | 0.085972 | 0.068107 | 0.091893 | 0.062238 | 0.097762 | 0.056421 | 0.103578 | 0.050657 | 0.109342
    -0.45 | 0.08 | 0.074028 | 0.085972 | 0.068107 | 0.091893 | 0.062238 | 0.097762 | 0.056421 | 0.103578 | 0.050657 | 0.109342
    -0.3 | 0.08 | 0.074028 | 0.085972 | 0.068107 | 0.091893 | 0.062238 | 0.097762 | 0.056421 | 0.103578 | 0.050657 | 0.109342
    -0.15 | 0.08 | 0.074028 | 0.085972 | 0.068107 | 0.091893 | 0.062238 | 0.097762 | 0.056421 | 0.103578 | 0.050657 | 0.109342
    0 | 0.08 | 0.074028 | 0.085972 | 0.068107 | 0.091893 | 0.062238 | 0.097762 | 0.056421 | 0.103578 | 0.050657 | 0.109342
    0.15 | 0.08 | 0.074028 | 0.085972 | 0.068107 | 0.091893 | 0.062238 | 0.097762 | 0.056421 | 0.103578 | 0.050657 | 0.109342
    0.3 | 0.08 | 0.074028 | 0.085972 | 0.068107 | 0.091893 | 0.062238 | 0.097762 | 0.056421 | 0.103578 | 0.050657 | 0.109342
    0.45 | 0.08 | 0.074028 | 0.085972 | 0.068107 | 0.091893 | 0.062238 | 0.097762 | 0.056421 | 0.103578 | 0.050657 | 0.109342
    0.6 | 0.08 | 0.074028 | 0.085972 | 0.068107 | 0.091893 | 0.062238 | 0.097762 | 0.056421 | 0.103578 | 0.050657 | 0.109342
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  tbl10: Table "Table associée à la sonde 10"
    teta | Variable dépendante psi1 (1), Point: (1.001, -0.001)
    -0.75 | 1.52552
    -0.6 | 1.17105
    -0.45 | 0.790278
    -0.3 | 0.391758
    -0.15 | -0.0155603
    0 | -0.422529
    0.15 | -0.820009
    0.3 | -1.19907
    0.45 | -1.55121
    0.6 | -1.86851
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
Plots
  pg1: PlotGroup2D "Groupe de graphiques 2D 1" | data = dset1
    con1: Contour "Isovaleurs 1" | expr = psi; contourlabels = on
  pg2: PlotGroup2D "Groupe de graphiques 2D 2" | data = dset1
    con1: Contour "Isovaleurs 1" | expr = psi2
  pg4: PlotGroup2D "Groupe de graphiques 2D 4" | data = dset1
    surf1: Surface | expr = P
  pg5: PlotGroup1D "Groupe de graphiques 1D 5" | data = dset1
    lngr1: LineGraph "Graphique sur ligne 1" on boundaries 1-198 | expr = P; title = portance; xdata = expr; xdataexpr = x
  pg6: PlotGroup1D "Groupe de graphiques sur sonde 6"
    tblp1: Table "Graphique basé sur la table de sonde 1" | table = tbl10

Exports
  tbl4: Table "p" | table = tbl7; filename = /home/etu/z/p1310840/tp_naca/pression.txt
  tbl5: Table "x" | table = tbl8; filename = /home/etu/z/p1310840/tp_naca/coorX.txt
  tbl6: Table "y" | table = tbl9; filename = /home/etu/z/p1310840/tp_naca/coorY.txt