// COMSOL Multiphysics 5.2.1.199 model "nacacouche.mph"
// sans titre
// Outline of the model tree

Variables
  var1 "Variables 1"
    U0 = 1
    alphadeg = 1
    alpha = alphadeg*pi/180
    Re = 10000

Geometry
  geom1 "geometrique" (2D, length unit m)
    imp1: Import "Importer 1" | filename = /home/etu/z/p1310840/tp_naca/nacacam.dxf; knit = solid
    c1: Circle "Cercle 1" | r = 10
    r1: Rectangle | pos = {0, -10}; size = {100, 20}
    uni1: Union | input = c1, r1; keep = off; intbnd = off; edge = all
    dif1: Difference "Différence 1" | input = uni1; input2 = imp1
    fin: Finalize "Constituer une union"

Physics
  spf: LaminarFlow "Ecoulement laminaire" on all domains
    dependent variable u = {u, v, w}
    fp1: FluidProperties "Propriétés du fluide 1" (default) | rho_mat = userdef; rho = 1; mu_mat = userdef; mu = 1/Re
    init1: init "Valeurs initiales 1" (default)
    wall1: Wall "Paroi 1" (default)
    inl1: InletBoundary "Entrée 1" on boundaries 1, 202, 203
      ComponentWise = VelocityFieldComponentWise
      u0 = {U0*cos(alpha), U0*sin(alpha), 0}
    out1: OutletBoundary "Sortie 1" on boundaries 4, 201
  lpeq: LaplaceEquation "Equation de Laplace" (disabled) on all domains
    dependent variable u2
    leq1: LaplaceEquation "Equation de Laplace 1" (default)
    zflx1: ZeroFluxBoundary "Flux nul 1" (default)
    init1: init "Valeurs initiales 1" (default)
    dir1: DirichletBoundary "Condition de Dirichlet 2" on boundaries 1, 4, 201-203 | r = U0*cos(alpha)*y
    dir2: DirichletBoundary "Condition de Dirichlet 1" on no boundaries | r = 0

Mesh
  mesh1 "Maillage 1"
    size: MeshSizeDefault "Taille" | hauto = 5
    size1: Size "Taille 1" on all boundaries | hauto = 5
    cr1: CornerRefinement "Contrôle aux angles vifs 1" on domains 1 | minangle = 240; refinement = 0.25
    ftri1: FreeTri "Triangle libre 1" on remaining entities
      xscale = 1
      yscale = 1
      smoothcontrol = on
      smoothmaxiter = 8
      smoothmaxdepth = 8
    bl1: BndLayer "Couches Limites 1" on domains 1
      sharpcorners = trim
      trimminangle = 240
      trimmaxangle = 50
      splitangle = 240
      splitdivangle = 100
      layerdec = 2
      smoothtransition = on
      smoothmaxiter = 8
      smoothmaxdepth = 16
      blp1: BndLayerProp "Propriétés de couche limite 1" on boundaries 2, 3, 5-200 | blnlayers = 10

Studies
  std1 "Etude 1"
    stat: Stationary "Stationnaire"

Solver configurations
  sol1 "Solution 1" (study std1)
    v1: Variables "Variables dépendantes 1"
    s1: Stationary "Solveur stationnaire 1"
      fc1: FullyCoupled "Couplage fort 1" | linsolver = d1; dtech = auto; initstep = 0.01; minstep = 1.0E-6; maxiter = 100
      d1: Direct | linsolver = pardiso

Datasets
  dset1: Solution | solution = sol1

Derived values
  int1: IntLine "Intégration sur ligne 1" on boundaries 2, 3, 5-200
    data = dset1
    table = tbl2
    expr = p*(-nx*sin(alpha)+ny*cos(alpha))

Tables
  tbl2: Table
    // Intégration sur ligne 1 (p*(-nx*sin(alpha)+ny*cos(alpha)))
    p*(-nx*sin(alpha)+ny*cos(alpha)) (N/m)
    -0.0264328

Plots
  pg1: PlotGroup2D "Vitesse (spf)" | data = dset1
    surf1: Surface | expr = spf.U; differential = on
  pg2: PlotGroup2D "Pression (spf)" | data = dset1
    con1: Contour "Isovaleurs" | expr = p; differential = on
  pg3: PlotGroup1D "Groupe de graphiques 1D 3" | data = none
    tblp1: Table "Graphique de table 1" | table = tbl2